<?xml version="1.0" encoding="utf-8"?>
<!--

  German type UB I submarine "flight" model for JSBSim.

    Copyright (C) 2013  Anders Gidenstam  (anders(at)gidenstam.org)

    This program is free software; you can redistribute it and/or modify
    it under the terms of the GNU General Public License as published by
    the Free Software Foundation; either version 2 of the License, or
    (at your option) any later version.

    This program is distributed in the hope that it will be useful,
    but WITHOUT ANY WARRANTY; without even the implied warranty of
    MERCHANTABILITY or FITNESS FOR A PARTICULAR PURPOSE.  See the
    GNU General Public License for more details.

    You should have received a copy of the GNU General Public License
    along with this program; if not, write to the Free Software
    Foundation, Inc., 59 Temple Place, Suite 330, Boston, MA  02111-1307  USA

-->
<piston_engine name="Korting 60bhp diesel">
 <documentation>
  Based on the data in [3] for the 6 cylinder diesel of UC 5 reduced
  to 4 cylinders.
 </documentation>

 <displacement unit="IN3">1125.77</displacement>
 <bore unit="IN">            6.31</bore>
 <stroke unit="IN">          9.00</stroke>
 <!-- compression-ratio>         6.30</compression-ratio -->

 <cylinders>                 4.00</cylinders>
 <cycles>                    4.00</cycles>

 <maxhp>                    60.00</maxhp>

 <idlerpm>                  50.00</idlerpm>
 <maxrpm>                  500.00</maxrpm>

 <!-- bsfc unit="LBS/HP*HR">     0.37 </bsfc -->
 <!-- volumetric_efficiency>          <volumetric_efficiency -->

 <sparkfaildrop>             0.00</sparkfaildrop>

 <minmp unit="INHG">         12.0</minmp>
 <maxmp unit="INHG">         28.5</maxmp>

 <minthrottle>0.1</minthrottle>
 <maxthrottle>1.0</maxthrottle>

 <documentation>
  The electrical motor had 120 shp according to [1].

  According to [3] the motor can run on 250 or 500 V.
  At 500V the power is estimated to about 200hp.
 </documentation>
 <starter-torque unit="N*M">500</starter-torque> <!-- guessed -->
 <starter-rpm>800</starter-rpm>

</piston_engine>
